<!DOCTYPE autopilot SYSTEM "autopilot.dtd">

<autopilot name="Atlas VTOL">

  <state_machine name="ap" freq="PERIODIC_FREQUENCY" gcs_mode="true" settings_mode="true" settings_handler="autopilot_generated|SetModeHandler">

    <modules>
      <module name="control_mixing" type="atlas"/>
      <module name="stabilization" type="indi"/>
      <module name="guidance" type="indi_hybrid_tiltrotor"/>
    </modules>

    <includes>
      <include name="autopilot_rc_helpers.h"/>
<!--      <define name="MODE_MANUAL" value="AP_MODE_ATTITUDE_DIRECT" cond="ifndef MODE_MANUAL"/>-->
<!--      <define name="MODE_AUTO1" value="AP_MODE_ATTITUDE_Z_HOLD" cond="ifndef MODE_AUTO1"/>-->
      <define name="MODE_AUTO2" value="AP_MODE_NAV" cond="ifndef MODE_AUTO2"/>
      <define name="RCLost()" value="(radio_control.status == RC_REALLY_LOST)"/>
      <define name="DLModeAtt()" value="(autopilot_mode_auto2 == 0)"/>
      <define name="DLModeNav()" value="(autopilot_mode_auto2 == 1)"/>
    </includes>

    <settings>
      <dl_setting var="autopilot.kill_throttle" min="0" step="1" max="1" module="autopilot" values="Resurrect|Kill" handler="KillThrottle"/>
      <dl_setting var="autopilot_mode_auto2" min="0" step="1" max="1" module="autopilot" values="ATT|NAV"/>
    </settings>

    <control_block name="set_commands">
      <call fun="SetRotorcraftCommands(stabilization.cmd, autopilot_in_flight(), autopilot_get_motors_on())"/>
    </control_block>

    <mode_selection>
      <mode_select cond="RCMode0()" mode="MODE_MANUAL"/>
      <mode_select cond="RCMode1()" mode="MODE_AUTO1"/>
      <mode_select cond="RCMode2()" mode="MODE_AUTO2"/>
    </mode_selection>

    <exceptions>
      <exception cond="nav.too_far_from_home" deroute="HOME"/>
      <exception cond="kill_switch_is_on()" deroute="KILL"/>
    </exceptions>

    <!-- Kill throttle mode -->
    <mode name="KILL">
      <select cond="kill_switch_is_on()"/>
      <on_enter>
        <call fun="guidance_h_mode_changed(GUIDANCE_H_MODE_NONE)"/>
        <call fun="stabilization_mode_changed(STABILIZATION_MODE_NONE, 0)"/>
        <call fun="guidance_v_mode_changed(GUIDANCE_V_MODE_KILL)"/>
        <call fun="autopilot_set_in_flight(false)"/>
        <call fun="autopilot_set_motors_on(false)"/>
      </on_enter>
      <control>
        <call fun="SetCommands(commands_failsafe)"/>
      </control>
    </mode>

    <mode name="FAILSAFE" shortname="FAIL">
      <on_enter>
        <call fun="guidance_h_mode_changed(GUIDANCE_H_MODE_NONE)"/>
        <call fun="guidance_v_mode_changed(GUIDANCE_V_MODE_KILL)"/>
        <call fun="stabilization_mode_changed(STABILIZATION_MODE_ATTITUDE, STABILIZATION_ATT_SUBMODE_HEADING)"/>
        <call fun="autopilot_set_motors_on(false)"/>
      </on_enter>
      <control>
        <call fun="stabilization_get_failsafe_sp()" store="struct StabilizationSetpoint stab_failsafe"/>
        <call fun="th_sp_from_thrust_i(0, THRUST_AXIS_Z)" store="struct ThrustSetpoint thrust_sp"/>
        <call fun="stabilization_run(autopilot_in_flight(), &stab_failsafe, &thrust_sp, stabilization.cmd)"/>
        <call_block name="set_commands"/>
      </control>
      <exception cond="!GpsIsLost()" deroute="$LAST_MODE"/>
    </mode>

    <!-- RC position 0: direct throttle passthrough, no stabilization -->
    <mode name="MANUAL" shortname="MAN">
      <select cond="$DEFAULT_MODE"/>
      <on_enter>
        <call fun="guidance_h_mode_changed(GUIDANCE_H_MODE_NONE)"/>
        <call fun="guidance_v_mode_changed(GUIDANCE_V_MODE_RC_DIRECT)"/>
        <call fun="stabilization_mode_changed(STABILIZATION_MODE_ATTITUDE, STABILIZATION_ATT_SUBMODE_HEADING)"/>
      </on_enter>
      <control freq="NAVIGATION_FREQUENCY">
        <call fun="nav_periodic_task()"/>
      </control>
      <control>
        <call fun="control_mixing_atlas_manual()"/>
      </control>
      <exception cond="RCLost()" deroute="FAILSAFE"/>
    </mode>

    <mode name="ATTITUDE" shortname="ATT">
      <on_enter>
        <call fun="control_mixing_atlas_attitude_enter()"/>
      </on_enter>
      <control freq="NAVIGATION_FREQUENCY">
        <call fun="nav_periodic_task()"/>
      </control>
      <control>
        <call fun="control_mixing_atlas_attitude()"/>
      </control>
      <exception cond="RCLost()" deroute="FAILSAFE"/>
    </mode>

    <mode name="QUAD" shortname="QUAD">
      <on_enter>
        <call fun="control_mixing_atlas_quad_enter()"/>
      </on_enter>
      <control freq="NAVIGATION_FREQUENCY">
        <call fun="nav_periodic_task()"/>
      </control>
      <control>
        <call fun="control_mixing_atlas_quad()"/>
      </control>
      <exception cond="RCLost()" deroute="FAILSAFE"/>
    </mode>

    <mode name="NAV">
<!--      <on_enter>-->
<!--        <call fun="control_mixing_atlas_nav_enter()"/>-->
<!--      </on_enter>-->
<!--      <control freq="NAVIGATION_FREQUENCY">-->
<!--        <call fun="nav_periodic_task()"/>-->
<!--      </control>-->
<!--      <control>-->
<!--        <call fun="control_mixing_atlas_nav_run()"/>-->
<!--      </control>-->
<!--      <exception cond="GpsIsLost() &amp;&amp; autopilot_in_flight()" deroute="FAILSAFE"/>-->
<!--      <exception cond="RCLost()" deroute="FAILSAFE"/>-->
    </mode>

    <mode name="HOME">
<!--      <on_enter>-->
<!--        <call fun="control_mixing_atlas_nav_enter()"/>-->
<!--      </on_enter>-->
<!--      <control freq="NAVIGATION_FREQUENCY">-->
<!--        <call fun="nav_home()"/>-->
<!--      </control>-->
<!--      <control>-->
<!--        <call fun="control_mixing_atlas_nav_run()"/>-->
<!--      </control>-->
<!--      <exception cond="GpsIsLost()" deroute="FAILSAFE"/>-->
<!--      <exception cond="RCLost()" deroute="FAILSAFE"/>-->
    </mode>

  </state_machine>

</autopilot>
